// COMSOL Multiphysics 6.1.0.252 model "1.2.mph"
// Outline of the model tree

Geometry
  geom1 "Geometry 1" (3D, length unit m)
    blk1: Block | size = {1, 1, 0.1}
    fin: Finalize "Form Union"

Materials
  mat1: Common "Copper" on boundaries 3, 4
    def "Basic"
      relpermeability = 1
      electricconductivity = 5.998e7[S/m]
      heatcapacity = 385[J/(kg*K)]
      relpermittivity = 1
      emissivity = 0.5
      density = 8940[kg/m^3]
      thermalconductivity = 400[W/(m*K)]
    Enu "Young's modulus and Poisson's ratio"
      E = 126e9[Pa]
      nu = 0.34
    linzRes "Linearized resistivity"
      rho0 = 1.667e-8[ohm*m]
      alpha = 3.862e-3[1/K]
      Tref = 293.15[K]
  mat2: Common "Air" on domains 1
    def "Basic"
      thermalexpansioncoefficient = alpha_p(pA,T)
      molarmass = 0.02897[kg/mol]
      bulkviscosity = muB(T)
      relpermeability = 1
      relpermittivity = 1
      dynamicviscosity = eta(T)
      ratioofspecificheat = 1.4
      electricconductivity = 0[S/m]
      heatcapacity = Cp(T)
      density = rho(pA,T)
      thermalconductivity = k(T)
      soundspeed = cs(T)
      eta: Piecewise | arg = T; pieces = {200.0, 1600.0, -8.38278E-7+8.35717342E-8*T^1-7.69429583E-11*T^2+4.6437266E-14*T^3-1.06585607E-17*T^4}; argunit = K; fununit = Pa*s
      Cp: Piecewise | arg = T; pieces = {200.0, 1600.0, 1047.63657-0.372589265*T^1+9.45304214E-4*T^2-6.02409443E-7*T^3+1.2858961E-10*T^4}; argunit = K; fununit = J/(kg*K)
      rho: Analytic | expr = pA*0.02897/R_const[K*mol/J]/T; args = {pA, T}; fununit = kg/m^3; argunit = {Pa, K}
      k: Piecewise | arg = T; pieces = {200.0, 1600.0, -0.00227583562+1.15480022E-4*T^1-7.90252856E-8*T^2+4.11702505E-11*T^3-7.43864331E-15*T^4}; argunit = K; fununit = W/(m*K)
      cs: Analytic | expr = sqrt(1.4*R_const[K*mol/J]/0.02897*T); args = T; fununit = m/s; argunit = K
      an1: Analytic | funcname = alpha_p; expr = -1/rho(pA,T)*d(rho(pA,T),T); args = {pA, T}; fununit = 1/K; argunit = {Pa, K}
      an2: Analytic "Analytic 2a" | funcname = muB; expr = 0.6*eta(T); args = T; fununit = Pa*s; argunit = K
    RefractiveIndex
      n = 1
      ki = 0
    NonlinearModel
      BA = (def.gamma+1)/2
    idealGas
      Rs = R_const/Mn
      heatcapacity = Cp(T)
      ratioofspecificheat = 1.4
      molarmass = 0.02897
      Cp: Piecewise | arg = T; pieces = {200.0, 1600.0, 1047.63657-0.372589265*T^1+9.45304214E-4*T^2-6.02409443E-7*T^3+1.2858961E-10*T^4}; argunit = K; fununit = J/(kg*K)

Physics
  es: Electrostatics on all domains
    dependent variable V
    ccn1: ChargeConservation (default) | epsilonr_mat = userdef; epsilonr = 1
    zc1: ZeroCharge (default)
    init1: init "Initial Values 1" (default)
    gnd1: Ground on boundaries 3
    term1: Terminal on boundaries 4 | TerminalType = Voltage; V0 = 20; Q0 = 20

Mesh
  mesh1 "Mesh 1" (physics-controlled)

Studies
  std1 "Study 1"
    stat: Stationary

Solver configurations
  sol1 "Solution 1" (study std1)
    v1: Variables "Dependent Variables 1"
    s1: Stationary "Stationary Solver 1"
      fc1: FullyCoupled | linsolver = i1
      i1: Iterative | linsolver = cg
        mg1: Multigrid | prefun = amg; coarseningmethod = classic

Datasets
  dset1: Solution | solution = sol1

Derived values
  gev1: EvalGlobal "Global Evaluation 1"
    data = dset1
    table = tbl1
    expr = comp1.es.C11
    unit = F
    descr = Maxwell capacitance

Tables
  tbl1: Table
    // Global Evaluation 1
    Maxwell capacitance (F) | Maxwell capacitance (F) | Maxwell capacitance (F) | Maxwell capacitance (F)
    8.85419e-11 | 8.85419e-11 | 8.85419e-11 | 8.85419e-11

Plots
  pg1: PlotGroup3D "Electric Potential (es)" | data = dset1
    mslc1: Multislice
      expr = V
      multiplanexmethod = coord
      xcoord = es.CPx
      multiplaneymethod = coord
      ycoord = es.CPy
      multiplanezmethod = coord
      zcoord = es.CPz
    strmsl1: StreamlineMultislice
      expr = {es.Ex, es.Ey, es.Ez}
      multiplanexmethod = coord
      xcoord = es.CPx
      multiplaneymethod = coord
      ycoord = es.CPy
      multiplanezmethod = coord
      zcoord = es.CPz
      udist = 0.02
      col1: Color "Color Expression 1" | expr = V
      filt1: Filter | expr = !isScalingSystemDomain
    arwl1: ArrowLine | expr = {es.Ex, es.Ey, es.Ez}
  pg2: PlotGroup3D "Electric Field Norm (es)" | data = dset1
    mslc1: Multislice
      expr = es.normE
      multiplanexmethod = coord
      xcoord = es.CPx
      multiplaneymethod = coord
      ycoord = es.CPy
      multiplanezmethod = coord
      zcoord = es.CPz
    strmsl1: StreamlineMultislice
      expr = {es.Ex, es.Ey, es.Ez}
      multiplanexmethod = coord
      xcoord = es.CPx
      multiplaneymethod = coord
      ycoord = es.CPy
      multiplanezmethod = coord
      zcoord = es.CPz
      udist = 0.02
      col1: Color "Color Expression 1" | expr = es.normE
      filt1: Filter | expr = !isScalingSystemDomain